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/batch
! ANSYS input file written by Workbench version 2024 R1
! File used for geometry attach: C:\Users\Lucky Bhuskute\AppData\Local\Temp\WB_Lucky Bhuskute_50068_2\wbnew_files\dp0\Geom\DM\Geom.scdoc
/title,wbnew--Steady-State Thermal (C5)
/COM,/COM,     ANSYSMotion, 2024.1
/com,--- Data in consistent MKS units. See Solving Units in the help system for more information.
/units,MKS
/prep7
! Turn off shape checking because checks already performed inside WB mesher.
! See help system for more information.
SHPP,OFF,,NOWARN
etcon,set             ! allow ANSYS to choose best KEYOP's for 180x elements, resets any applicable keyopt to MAPDL defaults
/com,*********** Nodes for the whole assembly ***********
nblock,3,,21637
(1i9,3e20.9e3)
        1    -5.673333407E-02     4.000000000E-03     8.974950194E-03
        2    -5.673333407E-02     8.000000000E-03     8.974950194E-03
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-1
/com,*********** Elements for Body 1 "Geom\Solid" ***********
et,1,279
eblock,19,solid,,3440
(19i9)
        1        1        1        1        0        0        0        0       20        0        1     1800     5232     5345     3453     3434     5326     5346     3454
    12357    19370    15870    12356    15832    19557    15872    15830    12355    19369    19577    15869
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-1
/com,*********** Send User Defined Coordinate System(s) ***********
csys,0
toffst,273.15,  ! Temperature offset from absolute zero
/com,*********** Send Materials ***********
MP,KXX,1,0.25,	! W m^-1 C^-1

!************************* Model Summary ********************
!Geom\Solid,	nylon,	matid,	1
!************************* End Model Summary ********************
/com,*********** Define Temperature Constraint ***********
CMBLOCK,_CM33   ,NODE,     5394
(8i10)
      1713      1714      1715      1716      1717      1718      1719      1720
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/com,*********** Define Temperature Constraint ***********
CMBLOCK,_CM35   ,NODE,     5890
(8i10)
      1618      1619      1620      1621      1622      1623      1624      1625
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fcum,add                   ! add nodal forces up (needed in case have loads on the same edge,vertex)
fcum                       ! reset default on fcum command since done sending WB F loads
/com,***************** Define Uniform Initial temperature ***************
tunif,22.
fini
/com,****************************************************************************
/com,*************************    SOLUTION       ********************************
/com,****************************************************************************
/solu
antype,0                   ! static analysis
!eqsl,sparse               ! using sparse solver which is default so no eqsl command needed
cntr,print,1               ! print out contact info and also make no initial contact an error
cncheck,dmp		!	Enable program controlled contact splitting for distributed memory parallel run
rescontrol,,none                 ! Do not keep any restart files
dmpoption,emat,no             ! Don't combine emat file for DANSYS
dmpoption,esav,no             ! Don't combine esav file for DANSYS
/com,****************************************************
/com,******************* SOLVE FOR LS 1 OF 1 ****************
d,_CM33,temp,35.85
d,_CM35,temp,15.85
autots,on
nsub,1,10,1
time,1.
outres,erase
outres,all,none
outres,nsol,all
outres,rsol,all
outres,eangl,all
outres,veng,all
outres,fflux,all,
outres,cont,all,
cnvtol,heat,,1.e-003,,1.e-006 ! Program Controlled. Set MINREF equivalent of 1e-6 Watts
! *********** WB SOLVE COMMAND ***********
! check interactive state
*get,ANSINTER_,active,,int
*if,ANSINTER_,ne,0,then
/eof
*endif
solve
/com *************** Write FE CONNECTORS *********
CEWRITE,file,ce,,INTE
/com,****************************************************
/com,*************** FINISHED SOLVE FOR LS 1 *************
/post1
fini
