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/batch
! ANSYS input file written by Workbench version 2024 R1
! File used for geometry attach: C:\Users\Lucky Bhuskute\Downloads\full new jacket_files\dp0\Geom-2\DM\Geom-2.scdoc
/title,full new jacket--Steady-State Thermal-Electric Conduction (I5)
/COM,/COM,     ANSYSMotion, 2024.1
/com,--- Data in consistent MKS units. See Solving Units in the help system for more information.
/units,MKS
/prep7
! Turn off shape checking because checks already performed inside WB mesher.
! See help system for more information.
SHPP,OFF,,NOWARN
etcon,set             ! allow ANSYS to choose best KEYOP's for 180x elements, resets any applicable keyopt to MAPDL defaults
/com,*********** Nodes for the whole assembly ***********
nblock,3,,9358
(1i9,3e20.9e3)
        1     5.000000000E-04    -2.000000000E-04    -5.000000000E-04
        2     5.000000000E-04    -2.000000000E-04    -1.000000000E-03
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-1
/com,*********** Elements for Body 1 "Geom-2\Solid211" ***********
et,1,279
eblock,19,solid,,192
(19i9)
        1        1        1        1        0        0        0        0       20        0        1      165      410      412      413      166      372      373      346
      962     1457     1459      963      967     1404     1352      966      961     1405     1406     1353
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-1
/com,*********** Elements for Body 2 "Geom-2\Solid2111" ***********
et,2,226,110
eblock,19,solid,,72
(19i9)
        2        2        2        2        0        0        0        0       20        0      193     1542     1653     1658     1669     1543     1613     1614     1598
     1849     2070     2074     1850     1854     2009     1978     1853     1848     2010     2011     1979
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-1
/com,*********** Elements for Body 3 "Geom-2\Solid2112" ***********
et,3,226,110
eblock,19,solid,,72
(19i9)
        3        3        3        3        0        0        0        0       20        0      265     2139     2266     2255     2250     2140     2195     2211     2210
     2447     2671     2667     2446     2450     2575     2606     2451     2445     2576     2608     2607
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-1
/com,*********** Elements for Body 4 "Geom-2\Solid" ***********
et,4,226,110
eblock,19,solid,,343
(19i9)
        4        4        4        4        0        0        0        0       20        0      337     2682     3103     3146     3152     2933     3139     3145     3193
     3198     4379     4457     3199     4032     4449     4455     4033     3197     4378     4454     4469
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-1
/com,*********** Elements for Body 5 "Geom-2\Solid1" ***********
et,5,226,110
eblock,19,solid,,343
(19i9)
        5        5        5        5        0        0        0        0       20        0      680     4538     4910     4953     5008     4789     4951     4952     5049
     5054     6144     6229     5055     5888     6225     6227     5889     5053     6143     6226     6325
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-1
/com,*********** Elements for Body 6 "Geom-2\Solid2" ***********
et,6,226,110
eblock,19,solid,,75
(19i9)
        6        6        6        6        0        0        0        0       20        0     1023     6449     6562     6561     6559     6450     6529     6530     6531
     6771     6998     6996     6770     6774     6949     6951     6775     6769     6950     6952     6954
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-1
/com,*********** Elements for Body 7 "Geom-2\Solid21" ***********
et,7,279
eblock,19,solid,,192
(19i9)
        7        7        7        7        0        0        0        0       20        0     1098     7186     7463     7448     7437     7187     7366     7367     7368
     7984     8494     8484     7983     7987     8370     8372     7988     7982     8371     8373     8375
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-1
/com,*********** Send User Defined Coordinate System(s) ***********
csys,0
toffst,273.15,  ! Temperature offset from absolute zero
/com,*********** Set Reference Temperature ***********
tref,22.
/com,*********** Send Materials ***********
MP,KXX,1,40,	! W m^-1 C^-1

MP,KXX,2,350,	! W m^-1 C^-1
MP,RSVX,2,1e-08,	! kg m^3 A^-2 s^-3

MP,KXX,3,350,	! W m^-1 C^-1
MP,RSVX,3,1e-08,	! kg m^3 A^-2 s^-3

MP,KXX,4,2,	! W m^-1 C^-1
MP,SBKX,4,0.00025,	! V C^-1
MP,RSVX,4,3e-05,	! kg m^3 A^-2 s^-3

MP,KXX,5,1,	! W m^-1 C^-1
MP,SBKX,5,-0.0002,	! V C^-1
MP,RSVX,5,2e-05,	! kg m^3 A^-2 s^-3

MP,KXX,6,350,	! W m^-1 C^-1
MP,RSVX,6,1e-08,	! kg m^3 A^-2 s^-3

MP,KXX,7,40,	! W m^-1 C^-1

!************************* Model Summary ********************
!Geom-2\Solid211,	AL2O3,	matid,	1
!Geom-2\Solid2111,	copper,	matid,	2
!Geom-2\Solid2112,	copper,	matid,	3
!Geom-2\Solid,	p-type,	matid,	4
!Geom-2\Solid1,	n-type,	matid,	5
!Geom-2\Solid2,	copper,	matid,	6
!Geom-2\Solid21,	AL2O3,	matid,	7
!************************* End Model Summary ********************
/com,*********** Create Contact "Contact Region" ***********
*set,tid,9
*set,cid,8
r,tid
r,cid
et,tid,170
et,cid,174
eblock,10,,,54
(15i9)
     3308        9        9        9        0      267      268      257      256     1187     1167     1164     1165
     3309        9        9        9        0      278      279      268      267     1210     1190     1187     1188
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-1
eblock,10,,,54
(15i9)
     3362        8        8        8        0      267      268      257      256     1187     1167     1164     1165
     3363        8        8        8        0      278      279      268      267     1210     1190     1187     1188
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-1
eblock,10,,,72
(15i9)
     3416        8        9        8        0     1653     1542     1669     1658     1849     1850     2074     2070
     3417        8        9        8        0     1542     1537     1668     1669     1832     1834     2084     1850
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-1
eblock,10,,,72
(15i9)
     3488        9        8        9        0     1653     1542     1669     1658     1849     1850     2074     2070
     3489        9        8        9        0     1542     1537     1668     1669     1832     1834     2084     1850
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-1
keyo,cid,8,2               ! auto create asymmetric contact (from Program Controlled setting)
keyo,cid,10,0              ! adjust contact stiffness each NR iteration (from Program Controlled setting)
keyo,cid,12,5              ! bonded always
keyo,cid,18,1              ! small sliding turned on by application
keyo,cid,2,0               ! augmented Lagrange (from Program Controlled setting)
keyo,cid,4,0               ! on Gauss point (from Program Controlled setting)
keyo,cid,9,1               ! ignore initial gaps/penetration
keyo,cid,7,0               ! No Prediction
rmod,tid,3,10.      ! FKN
rmod,tid,5,0.       ! ICONT
rmod,tid,6,0.       ! PINB
rmod,tid,10,0.      ! CNOF
rmod,tid,12,0.      ! FKT
rmod,tid,36,47      ! WB DSID
rmod,cid,3,10.      ! FKN
rmod,cid,5,0.       ! ICONT
rmod,cid,6,0.       ! PINB
rmod,cid,10,0.      ! CNOF
rmod,cid,12,0.      ! FKT
rmod,cid,36,47      ! WB DSID
*set,_maxkxx,3500000.
rmod,cid,14,_maxkxx/_ASMDIAG         ! TCC, Divide by Length since Traction Based
rmod,tid,14,_maxkxx/_ASMDIAG      ! TCC, Divide by Length since Traction Based
keyo,cid,1,2     ! Pure thermal contact
*set,_maxCond,1000000000000.
rmod,cid,19,_maxCond/_ASMDIAG      ! ECC
rmod,tid,19,_maxCond/_ASMDIAG     ! ECC
/com,*********** Create Contact "Contact Region 2" ***********
*set,tid,11
*set,cid,10
r,tid
r,cid
et,tid,170
et,cid,174
eblock,10,,,54
(15i9)
     3560       11       11       11        0      179      180      169      168     1003      975      971      972
     3561       11       11       11        0      190      191      180      179     1026     1006     1003     1004
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-1
eblock,10,,,54
(15i9)
     3614       10       10       10        0      179      180      169      168     1003      975      971      972
     3615       10       10       10        0      190      191      180      179     1026     1006     1003     1004
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-1
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eblock,10,,,72
(15i9)
     3740       11       10       11        0     2210     2140     2195     2211     2451     2450     2575     2606
     3741       11       10       11        0     2209     2151     2140     2210     2484     2449     2451     2604
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-1
keyo,cid,8,2               ! auto create asymmetric contact (from Program Controlled setting)
keyo,cid,10,0              ! adjust contact stiffness each NR iteration (from Program Controlled setting)
keyo,cid,12,5              ! bonded always
keyo,cid,18,1              ! small sliding turned on by application
keyo,cid,2,0               ! augmented Lagrange (from Program Controlled setting)
keyo,cid,4,0               ! on Gauss point (from Program Controlled setting)
keyo,cid,9,1               ! ignore initial gaps/penetration
keyo,cid,7,0               ! No Prediction
rmod,tid,3,10.      ! FKN
rmod,tid,5,0.       ! ICONT
rmod,tid,6,0.       ! PINB
rmod,tid,10,0.      ! CNOF
rmod,tid,12,0.      ! FKT
rmod,tid,36,50      ! WB DSID
rmod,cid,3,10.      ! FKN
rmod,cid,5,0.       ! ICONT
rmod,cid,6,0.       ! PINB
rmod,cid,10,0.      ! CNOF
rmod,cid,12,0.      ! FKT
rmod,cid,36,50      ! WB DSID
*set,_maxkxx,3500000.
rmod,cid,14,_maxkxx/_ASMDIAG         ! TCC, Divide by Length since Traction Based
rmod,tid,14,_maxkxx/_ASMDIAG      ! TCC, Divide by Length since Traction Based
keyo,cid,1,2     ! Pure thermal contact
*set,_maxCond,1000000000000.
rmod,cid,19,_maxCond/_ASMDIAG      ! ECC
rmod,tid,19,_maxCond/_ASMDIAG     ! ECC
/com,*********** Create Contact "Contact Region 3" ***********
*set,tid,13
*set,cid,12
r,tid
r,cid
et,tid,170
et,cid,174
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eblock,10,,,49
(15i9)
     3945       13       12       13        0     4965     4966     4832     4845     6251     5989     5988     6014
     3946       13       12       13        0     4964     4972     4966     4965     6250     6253     6251     6249
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-1
keyo,cid,8,2               ! auto create asymmetric contact (from Program Controlled setting)
keyo,cid,10,0              ! adjust contact stiffness each NR iteration (from Program Controlled setting)
keyo,cid,12,5              ! bonded always
keyo,cid,18,1              ! small sliding turned on by application
keyo,cid,2,0               ! augmented Lagrange (from Program Controlled setting)
keyo,cid,4,0               ! on Gauss point (from Program Controlled setting)
keyo,cid,9,1               ! ignore initial gaps/penetration
keyo,cid,7,0               ! No Prediction
rmod,tid,3,10.      ! FKN
rmod,tid,5,0.       ! ICONT
rmod,tid,6,0.       ! PINB
rmod,tid,10,0.      ! CNOF
rmod,tid,12,0.      ! FKT
rmod,tid,36,53      ! WB DSID
rmod,cid,3,10.      ! FKN
rmod,cid,5,0.       ! ICONT
rmod,cid,6,0.       ! PINB
rmod,cid,10,0.      ! CNOF
rmod,cid,12,0.      ! FKT
rmod,cid,36,53      ! WB DSID
*set,_maxkxx,3500000.
rmod,cid,14,_maxkxx/_ASMDIAG         ! TCC, Divide by Length since Traction Based
rmod,tid,14,_maxkxx/_ASMDIAG      ! TCC, Divide by Length since Traction Based
*set,_maxCond,1000000000000.
rmod,cid,19,_maxCond/_ASMDIAG      ! ECC
rmod,tid,19,_maxCond/_ASMDIAG     ! ECC
keyo,cid,1,4     ! Thermo-Electric contact
/com,*********** Create Contact "Contact Region 4" ***********
*set,tid,15
*set,cid,14
r,tid
r,cid
et,tid,170
et,cid,174
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eblock,10,,,49
(15i9)
     4127       15       14       15        0     3139     3103     3146     3145     4378     4379     4454     4449
     4128       15       14       15        0     3140     3109     3103     3139     4396     4377     4378     4448
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-1
keyo,cid,8,2               ! auto create asymmetric contact (from Program Controlled setting)
keyo,cid,10,0              ! adjust contact stiffness each NR iteration (from Program Controlled setting)
keyo,cid,12,5              ! bonded always
keyo,cid,18,1              ! small sliding turned on by application
keyo,cid,2,0               ! augmented Lagrange (from Program Controlled setting)
keyo,cid,4,0               ! on Gauss point (from Program Controlled setting)
keyo,cid,9,1               ! ignore initial gaps/penetration
keyo,cid,7,0               ! No Prediction
rmod,tid,3,10.      ! FKN
rmod,tid,5,0.       ! ICONT
rmod,tid,6,0.       ! PINB
rmod,tid,10,0.      ! CNOF
rmod,tid,12,0.      ! FKT
rmod,tid,36,56      ! WB DSID
rmod,cid,3,10.      ! FKN
rmod,cid,5,0.       ! ICONT
rmod,cid,6,0.       ! PINB
rmod,cid,10,0.      ! CNOF
rmod,cid,12,0.      ! FKT
rmod,cid,36,56      ! WB DSID
*set,_maxkxx,3500000.
rmod,cid,14,_maxkxx/_ASMDIAG         ! TCC, Divide by Length since Traction Based
rmod,tid,14,_maxkxx/_ASMDIAG      ! TCC, Divide by Length since Traction Based
*set,_maxCond,1000000000000.
rmod,cid,19,_maxCond/_ASMDIAG      ! ECC
rmod,tid,19,_maxCond/_ASMDIAG     ! ECC
keyo,cid,1,4     ! Thermo-Electric contact
/com,*********** Create Contact "Contact Region 5" ***********
*set,tid,17
*set,cid,16
r,tid
r,cid
et,tid,170
et,cid,174
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eblock,10,,,30
(15i9)
     4304       17       16       17        0     6417     6413     6550     6551     6652     6654     6987     6667
     4305       17       16       17        0     6413     6409     6549     6550     6639     6641     6986     6654
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-1
keyo,cid,8,2               ! auto create asymmetric contact (from Program Controlled setting)
keyo,cid,10,0              ! adjust contact stiffness each NR iteration (from Program Controlled setting)
keyo,cid,12,5              ! bonded always
keyo,cid,18,1              ! small sliding turned on by application
keyo,cid,2,0               ! augmented Lagrange (from Program Controlled setting)
keyo,cid,4,0               ! on Gauss point (from Program Controlled setting)
keyo,cid,9,1               ! ignore initial gaps/penetration
keyo,cid,7,0               ! No Prediction
rmod,tid,3,10.      ! FKN
rmod,tid,5,0.       ! ICONT
rmod,tid,6,0.       ! PINB
rmod,tid,10,0.      ! CNOF
rmod,tid,12,0.      ! FKT
rmod,tid,36,59      ! WB DSID
rmod,cid,3,10.      ! FKN
rmod,cid,5,0.       ! ICONT
rmod,cid,6,0.       ! PINB
rmod,cid,10,0.      ! CNOF
rmod,cid,12,0.      ! FKT
rmod,cid,36,59      ! WB DSID
*set,_maxkxx,3500000.
rmod,cid,14,_maxkxx/_ASMDIAG         ! TCC, Divide by Length since Traction Based
rmod,tid,14,_maxkxx/_ASMDIAG      ! TCC, Divide by Length since Traction Based
*set,_maxCond,1000000000000.
rmod,cid,19,_maxCond/_ASMDIAG      ! ECC
rmod,tid,19,_maxCond/_ASMDIAG     ! ECC
keyo,cid,1,4     ! Thermo-Electric contact
/com,*********** Create Contact "Contact Region 6" ***********
*set,tid,19
*set,cid,18
r,tid
r,cid
et,tid,170
et,cid,174
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eblock,10,,,30
(15i9)
     4462       19       18       19        0     6562     6449     6559     6561     6771     6770     6996     6998
     4463       19       18       19        0     6449     6445     6558     6559     6756     6758     6995     6770
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-1
keyo,cid,8,2               ! auto create asymmetric contact (from Program Controlled setting)
keyo,cid,10,0              ! adjust contact stiffness each NR iteration (from Program Controlled setting)
keyo,cid,12,5              ! bonded always
keyo,cid,18,1              ! small sliding turned on by application
keyo,cid,2,0               ! augmented Lagrange (from Program Controlled setting)
keyo,cid,4,0               ! on Gauss point (from Program Controlled setting)
keyo,cid,9,1               ! ignore initial gaps/penetration
keyo,cid,7,0               ! No Prediction
rmod,tid,3,10.      ! FKN
rmod,tid,5,0.       ! ICONT
rmod,tid,6,0.       ! PINB
rmod,tid,10,0.      ! CNOF
rmod,tid,12,0.      ! FKT
rmod,tid,36,62      ! WB DSID
rmod,cid,3,10.      ! FKN
rmod,cid,5,0.       ! ICONT
rmod,cid,6,0.       ! PINB
rmod,cid,10,0.      ! CNOF
rmod,cid,12,0.      ! FKT
rmod,cid,36,62      ! WB DSID
*set,_maxkxx,3500000.
rmod,cid,14,_maxkxx/_ASMDIAG         ! TCC, Divide by Length since Traction Based
rmod,tid,14,_maxkxx/_ASMDIAG      ! TCC, Divide by Length since Traction Based
*set,_maxCond,1000000000000.
rmod,cid,19,_maxCond/_ASMDIAG      ! ECC
rmod,tid,19,_maxCond/_ASMDIAG     ! ECC
keyo,cid,1,4     ! Thermo-Electric contact
/com,*********** Create Contact "Contact Region 7" ***********
*set,tid,21
*set,cid,20
r,tid
r,cid
et,tid,170
et,cid,174
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eblock,10,,,84
(15i9)
     4726       21       20       21        0     7155     7140     7141     7156     7842     7841     7844     7887
     4727       21       20       21        0     7140     7125     7126     7141     7796     7795     7798     7841
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-1
keyo,cid,8,2               ! auto create asymmetric contact (from Program Controlled setting)
keyo,cid,10,0              ! adjust contact stiffness each NR iteration (from Program Controlled setting)
keyo,cid,12,5              ! bonded always
keyo,cid,18,1              ! small sliding turned on by application
keyo,cid,2,0               ! augmented Lagrange (from Program Controlled setting)
keyo,cid,4,0               ! on Gauss point (from Program Controlled setting)
keyo,cid,9,1               ! ignore initial gaps/penetration
keyo,cid,7,0               ! No Prediction
rmod,tid,3,10.      ! FKN
rmod,tid,5,0.       ! ICONT
rmod,tid,6,0.       ! PINB
rmod,tid,10,0.      ! CNOF
rmod,tid,12,0.      ! FKT
rmod,tid,36,65      ! WB DSID
rmod,cid,3,10.      ! FKN
rmod,cid,5,0.       ! ICONT
rmod,cid,6,0.       ! PINB
rmod,cid,10,0.      ! CNOF
rmod,cid,12,0.      ! FKT
rmod,cid,36,65      ! WB DSID
*set,_maxkxx,3500000.
rmod,cid,14,_maxkxx/_ASMDIAG         ! TCC, Divide by Length since Traction Based
rmod,tid,14,_maxkxx/_ASMDIAG      ! TCC, Divide by Length since Traction Based
keyo,cid,1,2     ! Pure thermal contact
*set,_maxCond,1000000000000.
rmod,cid,19,_maxCond/_ASMDIAG      ! ECC
rmod,tid,19,_maxCond/_ASMDIAG     ! ECC
nsel,all
esel,all
/com,*********** Create Voltage "Voltage" ***********
CMBLOCK,_CM78   ,NODE,      253
(8i10)
      2085      2086      2087      2088      2089      2090      2091      2092
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/com,*********** Define Temperature Constraint ***********
CMBLOCK,_CM74   ,NODE,     1322
(8i10)
         1         2         3         4         5         6         7         8
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/com,*********** Define Temperature Constraint ***********
CMBLOCK,_CM76   ,NODE,     1322
(8i10)
      7022      7023      7024      7025      7026      7027      7028      7029
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fcum,add                   ! add nodal forces up (needed in case have loads on the same edge,vertex)
fcum                       ! reset default on fcum command since done sending WB F loads
fini
/com,****************************************************************************
/com,*************************    SOLUTION       ********************************
/com,****************************************************************************
/solu
antype,0                   ! static analysis
!eqsl,sparse               ! using sparse solver which is default so no eqsl command needed
cntr,print,1               ! print out contact info and also make no initial contact an error
cncheck,dmp		!	Enable program controlled contact splitting for distributed memory parallel run
dmpoption,emat,no             ! Don't combine emat file for DANSYS
dmpoption,esav,no             ! Don't combine esav file for DANSYS
/com,****************************************************
/com,******************* SOLVE FOR LS 1 OF 1****************
d,_CM78,volt,0.
nsel,all
d,_CM74,temp,45.
d,_CM76,temp,37.
autots,on
nsub,1,10,1
time,1.
outres,erase
outres,all,none
outres,nsol,all
outres,rsol,all
outres,eangl,all
outres,veng,all
outres,fflux,all
outres,fgrad,all
outres,eheat,all,
outres,cont,all,
cnvtol,heat,,1.e-003,,1.e-006 ! Program Controlled. Set MINREF equivalent of 1e-6 Watts
cnvtol,amps,,1.e-003,,1.e-006 ! Program Controlled. Set MINREF equivalent of 1e-6 A
neqit,1000
! *********** WB SOLVE COMMAND ***********
! check interactive state
*get,ANSINTER_,active,,int
*if,ANSINTER_,ne,0,then
/eof
*endif
solve
/com *************** Write FE CONNECTORS *********
CEWRITE,file,ce,,INTE
/com,****************************************************
/com,*************** FINISHED SOLVE FOR LS 1 *************
/post1
fini
